// SBML level 2 version 4

model enzymeKinetics()

  // Compartments:
  compartment cytoplasm = 1;

  // Species:
  species E in cytoplasm = 1/cytoplasm;
  species S in cytoplasm = 100/cytoplasm;
  species ES in cytoplasm = 1e-12/cytoplasm;
  species P in cytoplasm = 1e-12/cytoplasm;

  // Reactions:
  productionofcomplex: E + S => ES; kon*E*S*cytoplasm;
    kon = 1 litre_per_mole_per_second;
  decayofcomplex: ES => E + S; koff*ES*cytoplasm;
    koff = 0.1 per_second;
  productionofproduct: ES => E + P; kcat*ES*cytoplasm;
    kcat = 0.1 per_second;

  // Unit definitions:
  unit per_second = 1 / second;
  unit per_mole_per_second = 1 / (mole * second);
  unit litre_per_mole_per_second = litre / (mole * second);
end
